f := 300
R_1 := 4.7*10^3
R_3 := 1*10^3
R_4 := 1*10^3
C_1 := 1*10^-6
X_C := 1/(f*C_1) = 3333.33
# Холостой ход на 2-2'
Z_1x := -1j*X_C + R_1 + R_3 = 5700 - 3333.33i
A_11 := Z_1x/R_1 = 1.21277 - 0.70922i
A_21 := 1/R_1 = 0.000212766
# Короткое замыкание на 2-2'
Z_кз := -1j*X_C + R_3 + R_1*R_4/(R_1 + R_4) = 1824.56 - 3333.33i
I_1кз := 1
U_1.4 := I_1кз*R_1*R_4/(R_1 + R_4)
I_2кз := U_1.4/R_4
U_1кз := I_1кз*Z_кз
A_12 := U_1кз/I_2кз = 2212.77 - 4042.55i
A_22 := I_1кз/I_2кз = 1.21277
# Теорема обратимости
A_11*A_22 - A_12*A_21 = 1
# Переход к H параметрам
H_11 := A_12/A_22 = 1824.56 - 3333.33i
H_12 := (A_11*A_22 - A_12*A_21)/A_22 = 0.824561
H_21 := -1/A_22 = -0.824561
H_22 := A_21/A_22 = 0.000175439
# Метод приравнивания коэффициентов
# По первому закону Кирхгофа:
I_1 == I_2 + I'
# По второму закону Кирхгофа:
U_1 == I_1*(-1j*X_C + R_3) + I'*R_1
I' == (U_2 + I_2*R_4)/R_1
# Получили:
I_1 == U_2*1/R_1 + I_2*(1 + R_4/R_1)
U_1 == U_2*((-1j*X_C + R_3)/R_1 + 1) + I_2*((R_1 + R_4)*(-1j*X_C + R_3)/R_1 + R_4)
A_11 := (-1j*X_C + R_3)/R_1 + 1 = 1.21277 - 0.70922i
A_12 := (R_1 + R_4)*(-1j*X_C + R_3)/R_1 + R_4 = 2212.77 - 4042.55i
A_21 := 1/R_1 = 0.000212766
A_22 := 1 + R_4/R_1 = 1.21277
# 5.5 Коэффициенты четырехполюсника:
U_1K := 8
I_1K := 4.14
Z_1K := U_1K/I_1K = 1.93237
U_1X := 8
I_1X := 1.38
Z_1X := U_1X/I_1X = 5.7971
U_2K := 8
I_2K := 4.21
Z_2K := U_2K/I_2K = 1.90024
U_2X := 8
I_2X := 1.38
Z_2X := U_2X/I_2X = 5.7971
A_11 := sqrt(Z_1X*e^(-0.9j)/(Z_2X*e^(-0.1j) - Z_2K*e^(-9.3j))) = 0.791532 - 0.36077i
A_12 := A_11*Z_2K*e^(-9.3j) = -1.57772 + 0.493027i
A_21 := A_11/(Z_1X*e^(-0.9j)) = 0.133623 + 0.0682703i
A_22 := A_11*Z_2X*e^(-0.1j)/(Z_1X*e^(-0.9j)) = 0.810266 + 0.316459i
A_11*A_22 - A_12*A_21 = 1
