# Задаём численные значения элементов цепи
R1 := 110
R2 := 740
R3 := 860
R4 := 720
R5 := 950
R6 := 550
R7 := 380
R8 := 160
E6 := 600
E7 := 700
J3 := 5
J7 := 7
# Записываем уравнения, описывющие цепь, в матричном виде
# Ах = В, где: А - квадратная матрица;
# В - матрица столбец правых частей;
# х - матрица столбец искомых токов.
A := [
    1, 0, 0, 0, 0, -1, -1, 0;
    0, 1, -1, 0, 0, 0, -1, 0;
    0, 0, -1, 1, 0, 0, 0, 0;
    1, -1, 0, 0, 0, 0, 0, -1;
    0, 0, 0, 1, -1, 0, 0, 1;
    R1, 0, 0, 0, R5, R6, 0, R8;
    0, -R2, -R3, -R4, 0, 0, 0, R8;
    R1, R2, 0, 0, 0, 0, R7, 0
]
B := [J7; J3 + J7; J3; 0; 0; E6; 0; E7]
# Выводим численные значения матриц
A = [
    1, 0, 0, 0, 0, -1, -1, 0;
    0, 1, -1, 0, 0, 0, -1, 0;
    0, 0, -1, 1, 0, 0, 0, 0;
    1, -1, 0, 0, 0, 0, 0, -1;
    0, 0, 0, 1, -1, 0, 0, 1;
    110, 0, 0, 0, 950, 550, 0, 160;
    0, -740, -860, -720, 0, 0, 0, 160;
    110, 740, 0, 0, 0, 0, 380, 0
]
B = [7; 12; 5; 0; 0; 600; 0; 700]
# Находим неизвестные токи умножая обратную матрицу А на матрицу В.
x := A^-1*B
# Выводим численные значения токов в виде вектора строки путём транспонирования х.
transpose(x) = [2.32682, 3.16342, -3.8448, 1.1552, 0.318604, 0.318604, -4.99178, -0.836597]
