# Задаём численные значения элементов цепи
ORIGIN := 1
R[1] := 110
R[2] := 740
R[3] := 860
R[4] := 720
R[5] := 950
R[6] := 550
R[7] := 380
R[8] := 160
E[6] := 600
E[7] := 700
J[3] := 5
J[7] := 7
J[8] := 0
E[8] := 0
# Выводим матрицы столбцы с целью проверки исходных данных
E = [0; 0; 0; 0; 0; 600; 700; 0]
R = [110; 740; 860; 720; 950; 550; 380; 160]
J = [0; 0; 5; 0; 0; 0; 7; 0]
# Формируем диагональную матрицу RD из матрицы R
RD := diag(R)
# Выводим диагональную матрицу RD с целью проверки
RD = [
    110, 0, 0, 0, 0, 0, 0, 0;
    0, 740, 0, 0, 0, 0, 0, 0;
    0, 0, 860, 0, 0, 0, 0, 0;
    0, 0, 0, 720, 0, 0, 0, 0;
    0, 0, 0, 0, 950, 0, 0, 0;
    0, 0, 0, 0, 0, 550, 0, 0;
    0, 0, 0, 0, 0, 0, 380, 0;
    0, 0, 0, 0, 0, 0, 0, 160
]
# Формируем узловую матрицу А и контурную В
A := [
    -1, 0, 0, 0, 0, 1, 1, 0;
    0, -1, 1, 0, 0, 0, 1, 0;
    0, 0, 1, -1, 0, 0, 0, 0;
    -1, 1, 0, 0, 0, 0, 0, 1;
    0, 0, 0, -1, 1, 0, 0, -1
]
B := [1, 0, 0, 0, 1, 1, 0, 1; 0, -1, -1, -1, 0, 0, 0, 1; 1, 1, 0, 0, 0, 0, 1, 0]
# Находим контурные токи
Ik := (B*RD*transpose(B))^-1*(B*E + B*RD*J)
Ik = [0.318604; -1.1552; 2.00822]
# Определяем токи ветвей
I := transpose(B)*Ik
transpose(I) = [2.32682, 3.16342, 1.1552, 1.1552, 0.318604, 0.318604, 2.00822, -0.836597]
# Определяем токи в сопротивлениях ветвей
IR := I - J
transpose(IR) = [2.32682, 3.16342, -3.8448, 1.1552, 0.318604, 0.318604, -4.99178, -0.836597]
