ORIGIN := 1
# Задаём численные значения элементов цепи
R[1] := 110
R[2] := 740
R[3] := 860
R[4] := 720
R[5] := 950
R[6] := 550
R[7] := 380
R[8] := 160
E[6] := 600
E[7] := 700
J[3] := 5
J[7] := 7
E[8] := 0
J[8] := 0
# Формируем узловую матрицу А и контурную В
A := [
    -1, 0, 0, 0, 0, 1, 1, 0;
    0, -1, 1, 0, 0, 0, 1, 0;
    0, 0, 1, -1, 0, 0, 0, 0;
    -1, 1, 0, 0, 0, 0, 0, 1;
    0, 0, 0, -1, 1, 0, 0, -1
]
B := [1, 0, 0, 0, 1, 1, 0, 1; 0, -1, -1, -1, 0, 0, 0, 1; 1, 1, 0, 0, 0, 0, 1, 0]
RD := diag(R)  # Формируем диагональную матрицу RD из матрицы R
G := 1/RD  # Переформировываем матрицу RD в G
# Определяем
# потенциалы всех
# узлов по отношению
# к базисному узлу
F := (A*G*transpose(A))^-1*(-A*G*E - A*J)
F = [-424.768; -2172.11; -1134.42; 168.818; 302.673]
# Определяем напряжение на всех ветвях цепи
U := transpose(A)*F
transpose(U) = [255.95, 2340.93, -3306.53, 831.744, 302.673, -424.768, -2596.88, -133.855]
# Определяем токи в сопротивлениях ветвей
IR := G*(U + E)
transpose(IR) = [2.32682, 3.16342, -3.8448, 1.1552, 0.318604, 0.318604, -4.99178, -0.836597]
