R1 := 57
R2 := 14
R3 := 48
R4 := 0
R5 := 65
R6 := 0
R7 := 0
R8 := 0
Xl1 := 0
Xl2 := 0
Xl3 := 0
Xl4 := 31
Xl5 := 0
Xl6 := 29
Xl7 := 28
Xl8 := 36
Xc1 := 83
Xc2 := 0
Xc3 := 23
Xc4 := 0
Xc5 := 0
Xc6 := 91
Xc7 := 0
Xc8 := 19
E6м := 67
E6а := 214
Z1 := R1 + 1j*(-Xc1) = 57 - 83i
Z2 := R2 = 14
Z34 := R3 + 1j*(Xl4 - Xc3) = 48 + 8i
Z56 := R5 + 1j*(Xl6 - Xc6) = 65 - 62i
Z7 := 1j*Xl7 = 28i
Z8 := 1j*(Xl8 - Xc8) = 17i
E := E6м*e^(1j*E6а°) = -55.5455 - 37.4659i
E = -55.5455 - 37.4659i
Z := [Z1; Z2; Z34; Z56; Z7; Z8]
RD := diag(Z)
E := [0; 0; 0; E; 0; 0]
A := [1, -1, 0, 0, -1, 0; 0, 0, 1, -1, 1, 0; -1, 0, 0, 1, 0, 1; 0, 1, -1, 0, 0, -1]
B := [-1, 0, 0, -1, -1, 0; 0, -1, -1, 0, 1, 0; 1, 1, 0, 0, 0, 1]
Ik := (B*RD*transpose(B))^-1*(B*E) = [0.433424 + 0.615343i; 0.0252226 + 0.307649i; 0.551289 + 0.560459i]
I := transpose(B)*Ik = [0.117865 - 0.0548848i; 0.526066 + 0.252809i; -0.0252226 - 0.307649i; -0.433424 - 0.615343i; -0.408201 - 0.307694i; 0.551289 + 0.560459i]
