R1 := 57
R2 := 14
R3 := 48
R4 := 0
R5 := 65
R6 := 0
R7 := 0
R8 := 0
Xl1 := 0
Xl2 := 0
Xl3 := 0
Xl4 := 31
Xl5 := 0
Xl6 := 29
Xl7 := 28
Xl8 := 36
Xc1 := 83
Xc2 := 0
Xc3 := 23
Xc4 := 0
Xc5 := 0
Xc6 := 91
Xc7 := 0
Xc8 := 19
E6м := 67
E6а := 214
Z1 := R1 + 1j*(-Xc1) = 57 - 83i
Z2 := R2 = 14
Z34 := R3 + 1j*(Xl4 - Xc3) = 48 + 8i
Z56 := R5 + 1j*(Xl6 - Xc6) = 65 - 62i
Z7 := 1j*Xl7 = 28i
Z8 := 1j*(Xl8 - Xc8) = 17i
E := E6м*e^(1j*E6а°) = -55.5455 - 37.4659i
E = -55.5455 - 37.4659i
# Найдем контурные токи:
solve block
    # guess values
    J1 := 0
    J2 := 0
    J3 := 0
    # constraints
    J1*(Z1 + Z56 + Z7) - J2*Z7 - J3*Z1 == -E
    J2*(Z2 + Z34 + Z7) - J1*Z7 - J3*Z2 == 0
    J3*(Z1 + Z2 + Z8) - J1*Z1 - J2*Z2 == 0
    # solver
    [J1; J2; J3] := Find(J1, J2, J3) = [0.433424 + 0.615343i; 0.0252226 + 0.307649i; 0.551289 + 0.560459i]
end solve block
# Комплексные токи:
I1 := J3 - J1 = 0.117865 - 0.0548848i
I1 = 0.117865 - 0.0548848i
I2 := J3 - J2 = 0.526066 + 0.252809i
I2 = 0.526066 + 0.252809i
I34 := -J2 = -0.0252226 - 0.307649i
I34 = -0.0252226 - 0.307649i
I56 := -J1 = -0.433424 - 0.615343i
I56 = -0.433424 - 0.615343i
I7 := J2 - J1 = -0.408201 - 0.307694i
I7 = -0.408201 - 0.307694i
I8 := J3 = 0.551289 + 0.560459i
I8 = 0.551289 + 0.560459i
# Мгновенные значения токов:
i1 == sqrt(2)*0.13*sin(wt - 24.969°)
i2 == sqrt(2)*0.584*sin(wt + 25.667°)
i34 == sqrt(2)*0.309*sin(wt - 94.687°)
i56 == sqrt(2)*0.753*sin(wt - 125.159°)
i7 == sqrt(2)*0.511*sin(wt - 142.992°)
i8 == sqrt(2)*0.786*sin(wt + 45.473°)
# Комплексная мощность:
Sист := E*conj(I56) = 47.1291 - 17.941i
Sист = 47.1291 - 17.941i
Pакт := |I1|^2*Re(Z1) + |I2|^2*Re(Z2) + |I34|^2*Re(Z34) + |I56|^2*Re(Z56) = 47.1291
Pакт := Pакт + |I7|^2*Re(Z7) + |I8|^2*Re(Z8) = 47.1291
Qреак := |I1|^2*Im(Z1) + |I2|^2*Im(Z2) + |I34|^2*Im(Z34) + |I56|^2*Im(Z56) = -35.764
Qреак := Qреак + |I7|^2*Im(Z7) + |I8|^2*Im(Z8) = -17.941
Z28 := Z2*Z8/(Z1 + Z2 + Z8) = -1.6716 + 1.79823i
Z12 := Z1*Z2/(Z1 + Z2 + Z8) = 14.1907 - 3.17484i
Z18 := Z1*Z8/(Z1 + Z2 + Z8) = 3.85517 + 17.2316i
Zген := (Z34 + Z28)*(Z7 + Z12)/(Z34 + Z28 + Z7 + Z12) + Z18 = 18.193 + 30.3304i
Ux.x := E
I56 := Ux.x/(Zген + Z56) = -0.433424 - 0.615343i
Zген = 18.193 + 30.3304i
# Потенциалы:
φ5 := 0
φ1 := I1*Z1 = 2.16287 - 12.9112i
φ6 := φ1 + I2*Z2 = 9.5278 - 9.37191i
φ4 := φ6 + I34*Z34 = 10.7783 - 24.3409i
φ5 := φ4 + I56*Z56 - E = 1.42109e-14i
