R1 := 57
R2 := 14
R3 := 48
R4 := 0
R5 := 65
R6 := 0
R7 := 0
R8 := 0
Xl1 := 0
Xl2 := 0
Xl3 := 0
Xl4 := 31
Xl5 := 0
Xl6 := 29
Xl7 := 28
Xl8 := 36
Xc1 := 83
Xc2 := 0
Xc3 := 23
Xc4 := 0
Xc5 := 0
Xc6 := 91
Xc7 := 0
Xc8 := 19
E6м := 67
E6а := 214
Z1 := R1 + 1j*(-Xc1) = 57 - 83i
Z2 := R2 = 14
Z34 := R3 + 1j*(Xl4 - Xc3) = 48 + 8i
Z56 := R5 + 1j*(Xl6 - Xc6) = 65 - 62i
Z7 := 1j*Xl7 = 28i
Z8 := 1j*(Xl8 - Xc8) = 17i
E := E6м*e^(1j*E6а°) = -55.5455 - 37.4659i
E = -55.5455 - 37.4659i
Z := [Z1; Z2; Z34; Z56; Z7; Z8]
RD := diag(Z)
E := [0; 0; 0; E; 0; 0]
A := [1, -1, 0, 0, -1, 0; 0, 0, 1, -1, 1, 0; -1, 0, 0, 1, 0, 1; 0, 1, -1, 0, 0, -1]
B := [-1, 0, 0, -1, -1, 0; 0, -1, -1, 0, 1, 0; 1, 1, 0, 0, 0, 1]
G := 1/RD
F := (A*G*transpose(A))^-1*(-A*G*E)
F = [-0.75 - 3i; 9.25 - 14i; -2.5 + 9i; 4 - 2i]
U := transpose(A)*F = [1.75 - 12i; 4.75 + 1i; 5.25 - 12i; -11.75 + 23i; 10 - 11i; -6.5 + 11i]
